<?xml version="1.0" encoding="UTF-8"?>
<neuroml xmlns="http://www.neuroml.org/schema/neuroml2" xmlns:xsi="http://www.w3.org/2001/XMLSchema-instance" xsi:schemaLocation="http://www.neuroml.org/schema/neuroml2  https://raw.githubusercontent.com/NeuroML/NeuroML2/development/Schemas/NeuroML2/NeuroML_v2beta4.xsd" id="network_Hippocampus">

    <notes>

Network structure (NeuroML 2beta4) for project: Hippocampus saved with neuroConstruct v1.7.1 on: 12:59:38, 21-Jan-16

Cell Group: OLM_Inters contains 10 cells
Cell Group: CA1Pyrs contains 20 cells

Network connection: NetConn_CA1Pyrs_OLM_Inters contains 400 individual synaptic connections
Network connection: NetConn_CA1Pyrs_CA1Pyrs contains 200 individual synaptic connections

    </notes>

    <include href="CA1Pyramidal.cell.nml"/>
    <include href="DoubExpSyn.synapse.nml"/>
    <include href="KDR.channel.nml"/>
    <include href="LeakConductance.channel.nml"/>
    <include href="NaF.channel.nml"/>
    <include href="OLMInterneuron.cell.nml"/>
    <poissonFiringSynapse id="Input_0" averageRate="200.0 per_s" synapse="DoubExpSyn" spikeTarget="./DoubExpSyn"/>

    <network id="network_Hippocampus" type="networkWithTemperature" temperature="6.3 degC">

        <population id="OLM_Inters" component="OLMInterneuron" type="populationList" size="10">
            <instance id="0">
                <location x="494.72083" y="123.29888" z="144.07811"/>
            </instance>
            <instance id="1">
                <location x="137.61646" y="186.79683" z="37.53804"/>
            </instance>
            <instance id="2">
                <location x="19.517004" y="104.5851" z="156.34879"/>
            </instance>
            <instance id="3">
                <location x="878.80896" y="93.045876" z="144.83467"/>
            </instance>
            <instance id="4">
                <location x="615.3257" y="77.53425" z="91.372444"/>
            </instance>
            <instance id="5">
                <location x="328.8149" y="72.04751" z="47.62864"/>
            </instance>
            <instance id="6">
                <location x="150.491" y="116.62941" z="25.098026"/>
            </instance>
            <instance id="7">
                <location x="119.72451" y="142.01387" z="160.96167"/>
            </instance>
            <instance id="8">
                <location x="907.7888" y="119.0187" z="114.86115"/>
            </instance>
            <instance id="9">
                <location x="979.21594" y="49.06584" z="154.26257"/>
            </instance>
        </population>

        <population id="CA1Pyrs" component="CA1Pyramidal" type="populationList" size="20">
            <instance id="0">
                <location x="624.0195" y="232.68661" z="82.05557"/>
            </instance>
            <instance id="1">
                <location x="255.26994" y="227.56532" z="116.67055"/>
            </instance>
            <instance id="2">
                <location x="594.8537" y="226.1557" z="72.77752"/>
            </instance>
            <instance id="3">
                <location x="263.61453" y="223.40225" z="68.30205"/>
            </instance>
            <instance id="4">
                <location x="842.0201" y="231.86926" z="74.26758"/>
            </instance>
            <instance id="5">
                <location x="922.2501" y="218.84607" z="139.23427"/>
            </instance>
            <instance id="6">
                <location x="942.3694" y="215.80684" z="23.49776"/>
            </instance>
            <instance id="7">
                <location x="837.0606" y="218.77908" z="87.112465"/>
            </instance>
            <instance id="8">
                <location x="201.83337" y="232.66893" z="99.37241"/>
            </instance>
            <instance id="9">
                <location x="184.56674" y="215.10954" z="16.006351"/>
            </instance>
            <instance id="10">
                <location x="237.6427" y="215.0788" z="30.398464"/>
            </instance>
            <instance id="11">
                <location x="584.3587" y="219.38403" z="32.05812"/>
            </instance>
            <instance id="12">
                <location x="638.5825" y="234.59006" z="26.049126"/>
            </instance>
            <instance id="13">
                <location x="69.42654" y="218.7973" z="100.42477"/>
            </instance>
            <instance id="14">
                <location x="175.37964" y="227.95587" z="158.92783"/>
            </instance>
            <instance id="15">
                <location x="176.4623" y="232.4327" z="116.78967"/>
            </instance>
            <instance id="16">
                <location x="642.14813" y="230.62257" z="159.15099"/>
            </instance>
            <instance id="17">
                <location x="213.92375" y="225.0471" z="130.31429"/>
            </instance>
            <instance id="18">
                <location x="937.63763" y="227.89694" z="96.43436"/>
            </instance>
            <instance id="19">
                <location x="955.7529" y="217.55038" z="23.546612"/>
            </instance>
        </population>

        <projection synapse="DoubExpSyn" id="NetConn_CA1Pyrs_OLM_Inters" presynapticPopulation="CA1Pyrs" postsynapticPopulation="OLM_Inters">
            <connection id="0" preCellId="../CA1Pyrs/0/CA1Pyramidal" postCellId="../OLM_Inters/6/OLMInterneuron" preSegmentId="0" preFractionAlong="0.5" postSegmentId="11" postFractionAlong="0.33270264"/>
            <connection id="1" preCellId="../CA1Pyrs/0/CA1Pyramidal" postCellId="../OLM_Inters/2/OLMInterneuron" preSegmentId="0" preFractionAlong="0.5" postSegmentId="11" postFractionAlong="0.45786336"/>
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        </projection>

        <projection synapse="DoubExpSyn" id="NetConn_CA1Pyrs_CA1Pyrs" presynapticPopulation="CA1Pyrs" postsynapticPopulation="CA1Pyrs">
            <connection id="0" preCellId="../CA1Pyrs/0/CA1Pyramidal" postCellId="../CA1Pyrs/18/CA1Pyramidal" preSegmentId="0" preFractionAlong="0.5" postSegmentId="70" postFractionAlong="0.25395095"/>
            <connection id="1" preCellId="../CA1Pyrs/0/CA1Pyramidal" postCellId="../CA1Pyrs/10/CA1Pyramidal" preSegmentId="0" preFractionAlong="0.5" postSegmentId="74" postFractionAlong="0.51112556"/>
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        </projection>

        <inputList id="Input_0" component="Input_0" population="CA1Pyrs">
            <input id="0" target="../CA1Pyrs/0/CA1Pyramidal" destination="synapses" segmentId="73" fractionAlong="0.8849091"/>
            <input id="1" target="../CA1Pyrs/0/CA1Pyramidal" destination="synapses" segmentId="51" fractionAlong="0.6077834"/>
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        </inputList>

    </network>

</neuroml>
